// SBML level 2 version 3

model bionetgen_example()

  // Compartments:
  compartment cell = 1;

  // Species:
  species A_b in cell = 6.0103482/cell; A_b is "A(b)";
  species B_Y_0_a in cell = 0.10553177/cell; B_Y_0_a is "B(Y~0,a)";
  species A_b_1_B_Y_0_a_1 in cell = 0.0096518315/cell; A_b_1_B_Y_0_a_1 is "A(b!1).B(Y~0,a!1)";
  species B_Y_p_a in cell = 601.88482/cell; B_Y_p_a is "B(Y~p,a)";

  // Parameters:
  V = 1;
  km1 = 0.1;
  k2 = 0.01;
  NaV = 602*V;
  kp1 = 1/NaV;
  A0 = 0.01*NaV;
  B0 = 1*NaV;

  // Assignment rules:
  Bu := 0 + B_Y_0_a;
  Bp := 0 + B_Y_p_a;
  AB := 0 + A_b_1_B_Y_0_a_1;

  // Reactions:
  R1: A_b + B_Y_0_a => A_b_1_B_Y_0_a_1; kp1*A_b*B_Y_0_a;
  R2: A_b_1_B_Y_0_a_1 => A_b + B_Y_0_a; km1*A_b_1_B_Y_0_a_1;
  R3: A_b_1_B_Y_0_a_1 => A_b + B_Y_p_a; k2*A_b_1_B_Y_0_a_1;

  // Unit definitions:
  unit substance = item;
end
