// SBML level 2 version 1

model FGFR4_RTKsignalingnetworkrevision_2a()
  // update date: 26/10/2022
  // new mechanisms added:
  // ERK --> mTORC1 (via TSC1/2)
  // S6K1 --| mTORC2
  // mTORC2 --> AKT
  // new inhibitors
  // ERBBi
  // AKTi
  // MEKi

  // Compartments:
  compartment rootCompartment = 1;

  // Species:
  substanceOnly species IGFR in rootCompartment = 7.58;
  substanceOnly species pIGFR in rootCompartment = 0;
  substanceOnly species FGFR4 in rootCompartment = 962.77;
  substanceOnly species pFGFR4 in rootCompartment = 0;
  substanceOnly species ERBB in rootCompartment = 680.21;
  substanceOnly species pERBB in rootCompartment = 0;
  substanceOnly species IRS in rootCompartment = 13.04;
  substanceOnly species pIRS in rootCompartment = 0;
  substanceOnly species PI3K in rootCompartment = 2.72;
  substanceOnly species aPI3K in rootCompartment = 0;
  substanceOnly species PIP2 in rootCompartment = 5000;
  substanceOnly species PIP3 in rootCompartment = 0;
  substanceOnly species FRS2 in rootCompartment = 20.54;
  substanceOnly species pFRS2 in rootCompartment = 0;
  substanceOnly species Grb2 in rootCompartment = 6436.64;
  substanceOnly species aGrb2 in rootCompartment = 0;
  substanceOnly species Akt in rootCompartment = 653.74;
  substanceOnly species pAkt in rootCompartment = 0;
  substanceOnly species PDK1 in rootCompartment = 39.24;
  substanceOnly species aPDK1 in rootCompartment = 0;
  substanceOnly species mTORC1 in rootCompartment = 13.17;
  substanceOnly species amTORC1 in rootCompartment = 0;
  substanceOnly species S6K in rootCompartment = 41.1;
  substanceOnly species pS6K in rootCompartment = 0;
  substanceOnly species Sos in rootCompartment = 3.7;
  substanceOnly species aSos in rootCompartment = 0;
  substanceOnly species Shp2 in rootCompartment = 270.39;
  substanceOnly species aShp2 in rootCompartment = 0;
  substanceOnly species Ras in rootCompartment = 1813.21;
  substanceOnly species aRas in rootCompartment = 0;
  substanceOnly species Raf in rootCompartment = 27.49;
  substanceOnly species aRaf in rootCompartment = 0;
  substanceOnly species MEK in rootCompartment = 1997.8;
  substanceOnly species pMEK in rootCompartment = 0;
  substanceOnly species ERK in rootCompartment = 2054.4;
  substanceOnly species pERK in rootCompartment = 0;
  substanceOnly species GAB1 in rootCompartment = 20.03;
  substanceOnly species aGAB1 in rootCompartment = 0;
  substanceOnly species GAB2 in rootCompartment = 4.26;
  substanceOnly species aGAB2 in rootCompartment = 0;
  substanceOnly species mSPRY2 in rootCompartment = 0;
  substanceOnly species SPRY2 in rootCompartment = 0;
  substanceOnly species pSPRY2 in rootCompartment = 0;
  substanceOnly species mPTP in rootCompartment = 0;
  substanceOnly species PTP in rootCompartment = 0;
  substanceOnly species Cbl in rootCompartment = 5.43;
  substanceOnly species aCbl in rootCompartment = 0;
  substanceOnly species FOXO in rootCompartment = 1025;
  substanceOnly species pFOXO in rootCompartment = 1025;
  substanceOnly species mTORC2 in rootCompartment = 13.17;
  substanceOnly species amTORC2 in rootCompartment = 0;

  // Parameters:
  kc01f = 0.01;
  Vm01r = 0.01;
  ki01r = 1;
  kc02f = 0.01;
  // FGFR4i
  Ki02f = 1;
  Vm02r = 0.01;
  ki02r1 = 0.1;
  ki02r2 = 0.1;
  kc03f = 0.01;
  Vm03r = 0.01;
  ki03r = 0.1;
  kc04f = 0.01;
  ki04f = 1;
  Vm04r = 0.1;
  kc05f1 = 0.01;
  kc05f2 = 0.01;
  kc05f3 = 0.01;
  Vm05r = 0.1;
  kc06f = 0.01;
  Ki06f = 1;
  kc06r = 0.1;
  kc07f = 0.01;
  Vm07r = 0.01;
  kc08f = 0.01;
  Vm08r = 0.01;
  kc09f = 0.01;
  Vm09r = 0.01;
  kc10f = 0.01;
  Vm10r = 0.01;
  kc11f = 0.01;
  ki11f = 0.1;
  ki11r = 0.1;
  Vm11r = 0.01;
  kc12f1 = 0.01;
  kc12f2 = 0.01;
  kc12f3 = 0.01;
  ki12f = 0.1;
  Vm12r = 0.01;
  kc13f = 0.01;
  Vm13r = 0.01;
  kc14f1 = 0.01;
  kc14f2 = 0.01;
  Vm14r = 0.01;
  kc15f1 = 0.01;
  kc15f2 = 0.01;
  ki15f = 0.01;
  Vm15r = 0.01;
  kc16f = 0.01;
  ki16f1 = 0.1;
  ki16f2 = 0.1;
  Vm16r = 0.1;
  kc17f = 0.01;
  Vm17r = 0.01;
  kc18f = 0.01;
  Vm18r = 0.01;
  kc19f = 0.01;
  alpha19f = 0.1;
  ki19f = 0.1;
  Vm19r = 0.01;
  kc20f = 0.01;
  alpha20f = 0.1;
  ki20f1 = 0.1;
  ki20f2 = 0.1;
  Vm20r = 0.01;
  vs21 = 0.01;
  kc21 = 0.1;
  Km21 = 1;
  kc23 = 0.01;
  Km23 = 1;
  kc24 = 0.1;
  kc25f = 0.01;
  kc25r = 0.01;
  kc26 = 0.1;
  vs27 = 0.01;
  kc27a = 0.1;
  Km27a = 1;
  kc27b = 0.01;
  Km27b = 1;
  kc29 = 0.1;
  Km29 = 1;
  kc31f = 0.01;
  Vm31r = 0.1;
  n02 = 1;
  Kmf02 = 2;
  n06 = 1;
  Kmf06 = 2;
  kc03f2 = 0.01;
  ki03f = 0.01;
  Ki03f2 = 0.01;
  kc05f4 = 0.01;
  kc32f = 0.01;
  Vm32r = 0.01;
  Ki08f = 0.01;
  Ki17f = 0.01;
  kc33f = 0.01;
  Vm33r = 0.01;
  kc08f1 = 0.01;
  ki33f = 0.01;
  kc09f1 = 0.01;
  Kmf08 = 0.01;
  Kmf17 = 0.01;
  Kmf03 = 0.01;
  PTEN = 9.54;
  IGF0 = 1e-30;
  HRG0 = 1e-30;
  FGF0 = 1e-30;
  IGF_on = 5000;
  FGF_on = 5000;
  HRG_on = 5000;
  FGFR4i_0 = 1e-30;
  PI3Ki_0 = 1e-30;
  ERBBi_0 = 1e-30;
  AKTi_0 = 1e-30;
  MEKi_0 = 1e-30;
  inh_on = 10000000000;

  // Assignment rules:
  IGF := IGF0*piecewise(1, time >= IGF_on, 0);
  HRG := HRG0*piecewise(1, time >= HRG_on, 0);
  FGF := FGF0*piecewise(1, time >= FGF_on, 0);
  FGFR4i := FGFR4i_0*piecewise(1, time >= inh_on, 0);
  PI3Ki := PI3Ki_0*piecewise(1, time >= inh_on, 0);
  ERBBi := ERBBi_0*piecewise(1, time >= inh_on, 0);
  AKTi := AKTi_0*piecewise(1, time >= inh_on, 0);
  MEKi := MEKi_0*piecewise(1, time >= inh_on, 0);

  // Reactions:
  v01: IGFR -> pIGFR; kc01f*IGF*IGFR - Vm01r*(1 + ki01r*PTP)*pIGFR;  // modifiers: PTP
  v02: FGFR4 -> pFGFR4; kc02f*FGF*FGFR4/(1 + Ki02f*(FGFR4i^n02/(Kmf02^n02 + FGFR4i^n02))) - Vm02r*(1 + ki02r1*PTP)*(1 + ki02r2*aCbl)*pFGFR4;  // modifiers: PTP, aCbl
  v03: ERBB -> pERBB; (kc03f*HRG + kc03f2*FOXO)*ERBB/(1 + ki03f*pERK)/(1 + Ki03f2*(ERBBi/(Kmf03 + ERBBi))) - Vm03r*(1 + ki03r*PTP)*pERBB;  // modifiers: FOXO, PTP, pERK
  v04: IRS -> pIRS; kc04f*pIGFR*IRS/(1 + ki04f*pS6K) - Vm04r*pIRS;  // modifiers: pIGFR, pS6K
  v05: PI3K -> aPI3K; (kc05f1*pIRS + kc05f2*(aGAB1 + aGAB2) + kc05f3*aRas + kc05f4*pERBB)*PI3K/(1 + Ki06f*(PI3Ki^n06/(Kmf06^n06 + PI3Ki^n06))) - Vm05r*aPI3K;  // modifiers: aGAB1, aGAB2, aRas, pERBB, pIRS
  v06: PIP2 -> PIP3; kc06f*aPI3K*PIP2 - kc06r*PTEN*PIP3;  // modifiers: aPI3K
  v07: PDK1 -> aPDK1; kc07f*PIP3*PDK1 - Vm07r*aPDK1;  // modifiers: PIP3
  v08: Akt -> pAkt; (kc08f*aPDK1 + kc08f1*amTORC2)*Akt/(1 + Ki08f*(AKTi/(Kmf08 + AKTi))) - Vm08r*pAkt;  // modifiers: aPDK1, amTORC2
  v09: mTORC1 -> amTORC1; (kc09f*pAkt + kc09f1*pERK)*mTORC1 - Vm09r*amTORC1;  // modifiers: pAkt, pERK
  v10: S6K -> pS6K; kc10f*S6K*amTORC1 - Vm10r*pS6K;  // modifiers: amTORC1
  v11: FRS2 -> pFRS2; kc11f*pFGFR4*FRS2/(1 + ki11r*pERK) - Vm11r*pFRS2*(1 + ki11f*aCbl);  // modifiers: aCbl, pERK, pFGFR4
  v12: Grb2 -> aGrb2; (kc12f1*pFRS2/(1 + ki12f*pSPRY2) + kc12f2*pERBB + kc12f3*pIRS)*Grb2 - Vm12r*aGrb2;  // modifiers: pERBB, pFRS2, pIRS, pSPRY2
  v13: Sos -> aSos; kc13f*Sos*aGrb2 - Vm13r*aSos;  // modifiers: aGrb2
  v14: Shp2 -> aShp2; (kc14f1*aGrb2 + kc14f2*(aGAB1 + aGAB2))*Shp2 - Vm14r*aShp2;  // modifiers: aGAB1, aGAB2, aGrb2
  v15: Ras -> aRas; (kc15f1*aSos/(1 + ki15f*pERK) + kc15f2*aShp2)*Ras - Vm15r*aRas;  // modifiers: aShp2, aSos, pERK
  v16: Raf -> aRaf; kc16f*Raf*aRas/((1 + ki16f1*pAkt)*(1 + ki16f2*(SPRY2 + pSPRY2))) - Vm16r*aRaf;  // modifiers: SPRY2, aRas, pAkt, pSPRY2
  v17: MEK -> pMEK; kc17f*MEK*aRaf/(1 + Ki17f*(MEKi/(Kmf17 + MEKi))) - Vm17r*pMEK;  // modifiers: aRaf
  v18: ERK -> pERK; kc18f*ERK*pMEK - Vm18r*pERK;  // modifiers: pMEK
  v19: GAB1 -> aGAB1; kc19f*(1 + alpha19f*PIP3)*aGrb2*GAB1/(1 + ki19f*pERK) - Vm19r*aGAB1;  // modifiers: PIP3, aGrb2, pERK
  v20: GAB2 -> aGAB2; kc20f*(1 + alpha20f*PIP3)*aGrb2*GAB2/((1 + ki20f1*pERK)*(1 + ki20f2*pAkt)) - Vm20r*aGAB2;  // modifiers: PIP3, aGrb2, pAkt, pERK
  v21: => mSPRY2; vs21 + kc21*pERK/(Km21 + pERK);  // modifiers: pERK
  v22: mSPRY2 => ; (vs21 + kc21)/100*mSPRY2;
  v23: => SPRY2; kc23*mSPRY2/(Km23 + mSPRY2);  // modifiers: mSPRY2
  v24: SPRY2 => ; kc24*SPRY2;
  v25: SPRY2 -> pSPRY2; kc25f*SPRY2*pFRS2 - kc25r*pSPRY2;  // modifiers: pFRS2
  v26: pSPRY2 => ; kc26*pSPRY2;
  v27: => mPTP; vs27 + kc27a*pERK/(Km27a + pERK) + kc27b*pAkt/(Km27b + pAkt);  // modifiers: pAkt, pERK
  v28: mPTP => ; (vs27 + kc27a + kc27b)/100*mPTP;
  v29: => PTP; kc29*mPTP/(Km29 + mPTP);  // modifiers: mPTP
  v30: PTP => ; kc29/100*PTP;
  v31: Cbl -> aCbl; kc31f*aGrb2*Cbl - Vm31r*aCbl;  // modifiers: aGrb2
  v32: FOXO -> pFOXO; kc32f*pAkt*FOXO - Vm32r*pFOXO;  // modifiers: pAkt
  v33: mTORC2 -> amTORC2; kc33f*PIP3*mTORC2/(1 + ki33f*pS6K) - Vm33r*amTORC2;  // modifiers: PIP3, pS6K
end
